// COMSOL Multiphysics 6.1.0.252 model "احسن حاجة.mph"
// Outline of the model tree

Parameters
  DIR = 1e4  // Inner retina diffusivity (μm²/s)
  DOR = 1e4  // Outer retina diffusivity
  DFL = 1e4  // Fluid layer diffusivity
  DCC = 1e4  // Choriocapillaris diffusivity
  kIR = 0.1  // Inner retina metabolism rate (1/s)
  kOR = 0.1  // Outer retina metabolism rate
  kFL = 0.1  // Fluid layer metabolism rate
  kCC = 0.1  // Choriocapillaris metabolism rate
  PIR_S = 20  // Inner boundary O₂ pressure (mm Hg)
  PCC_S = 100  // Outer boundary O₂ pressure

Pairs
  p1: Identity "Identity Pair 1" (disabled) | source: boundaries 1; destination: boundaries 2
  p2: Identity "Identity Pair 2" (disabled) | source: boundaries 2; destination: boundaries 3
  p3: Identity "Identity Pair 3" (disabled) | source: boundaries 3; destination: boundaries 4

Geometry
  geom1 "Geometry 1" (1D, length unit µm)
    i1: Interval | coord = {0, 200}
    i2: Interval | coord = {200, 400}
    i3: Interval | coord = {400, 600}
    i4: Interval | coord = {600, 800}
    fin: Finalize "Form Union"

Physics
  c: CoefficientFormPDE (disabled) on domains 1
    dependent variable u
    EquationForm.form = Automatic
    cfeq1: CoefficientFormPDE (default) | c = DIR; a = kIR; f = 0; da = 1
    zflx1: ZeroFluxBoundary "Zero Flux 1" (default)
    init1: init "Initial Values 1" (default)
    dir1: DirichletBoundary "Dirichlet Boundary Condition 1" on boundaries 1 | r = PIR_S
    dir2: DirichletBoundary "Dirichlet Boundary Condition 2" (disabled) on boundaries 2
      r = u - u2
      useDirichletCondition = 1
      constraintType = unidirectionalConstraint
      constraintMethod = elemental
    weak1: PairWeakContribution "Weak Contribution 1" on all boundaries
      pairs = p1
      weakExpression = test(u)*(DIR*ux - DOR*u2x)
  c2: CoefficientFormPDE (disabled) on domains 2
    dependent variable u2
    EquationForm.form = Automatic
    cfeq1: CoefficientFormPDE (default) | c = DOR; a = kOR; f = 0; da = 1
    zflx1: ZeroFluxBoundary "Zero Flux 1" (default)
    init1: init "Initial Values 1" (default)
    dir1: DirichletBoundary "Dirichlet Boundary Condition 2" (disabled) on boundaries 2 | r = u - u2
    dir2: DirichletBoundary "Dirichlet Boundary Condition 2a" (disabled) on boundaries 3 | r = u2 - u3
    weak1: PairWeakContribution "Weak Contribution 1" on all boundaries
      pairs = p2
      weakExpression = test(u2)*(DOR*u2x - DFL*u3x)
  c3: CoefficientFormPDE (disabled) on domains 3
    dependent variable u3
    EquationForm.form = Automatic
    cfeq1: CoefficientFormPDE (default) | c = DFL; a = kFL; f = 0; da = 1
    zflx1: ZeroFluxBoundary "Zero Flux 1" (default)
    init1: init "Initial Values 1" (default)
    dir2: DirichletBoundary "Dirichlet Boundary Condition 2a" (disabled) on boundaries 3 | r = u2 - u3
    dir1: DirichletBoundary "Dirichlet Boundary Condition 3" (disabled) on boundaries 4 | r = u3 - u4
    weak1: PairWeakContribution "Weak Contribution 1" on all boundaries
      pairs = p3
      weakExpression = test(u3)*(DFL*u3x - DCC*u4x)
  c4: CoefficientFormPDE (disabled) on domains 4
    dependent variable u4
    EquationForm.form = Automatic
    cfeq1: CoefficientFormPDE (default) | c = DCC; a = kCC; f = 0; da = 1
    zflx1: ZeroFluxBoundary "Zero Flux 1" (default)
    init1: init "Initial Values 1" (default)
    dir1: DirichletBoundary "Dirichlet Boundary Condition 1" on boundaries 5 | r = PCC_S
    dir2: DirichletBoundary "Dirichlet Boundary Condition 3" (disabled) on boundaries 4
      r = u3 - u4
      useDirichletCondition = 1
      constraintType = unidirectionalConstraint
      constraintMethod = elemental
  c5: CoefficientFormPDE on all domains
    dependent variable u5
    cfeq1: CoefficientFormPDE (default) | c = DIR; a = kIR; ea = 30; da = 1
    zflx1: ZeroFluxBoundary "Zero Flux 1" (default)
    init1: init "Initial Values 1" (default)
    dir1: DirichletBoundary "Dirichlet Boundary Condition 1" on boundaries 1
      r = PIR_S
      useDirichletCondition = 1
      constraintType = unidirectionalConstraint
      constraintMethod = elemental
    dir2: DirichletBoundary "Dirichlet Boundary Condition 2" on boundaries 5 | r = PCC_S
    weak1: PairWeakContribution "Weak Contribution 1" (disabled) on all boundaries
      pairs = p1
      constraintType = symmetricConstraint
      constraintMethod = nodal
      integrationOrder = 4
      quadratureFrame = spatial
      weakExpression = test(u)*(DIR*ux - DOR*u2x)
      automaticQuadrature = 1
    cfeq2: CoefficientFormPDE on domains 2 | c = DOR; a = kOR; f = 0; ea = 30; da = 1
    cfeq3: CoefficientFormPDE on domains 3 | c = DFL; a = kFL; f = 0; ea = 30; da = 1
    cfeq4: CoefficientFormPDE on domains 4 | c = DCC; a = kCC; f = 0; ea = 30; da = 1

Mesh
  mesh1 "Mesh 1"
    size: MeshSizeDefault | hmax = 20
    edg2: Edge on entire geometry
      dis1: Distribution on all domains | numelem = 10

Studies
  std1 "Study 1"
    time: Transient "Time Dependent" | tlist = range(0,5,30)

Solver configurations
  sol1 "Solution 1" (study std1)
    v1: Variables "Dependent Variables 1"
    t1: Time "Time-Dependent Solver 1" | tlist = range(0,5,30); eventout = on
      dDef: Direct
      fc1: FullyCoupled | linsolver = dDef

Datasets
  dset1: Solution | solution = sol1

Plots
  pg2: PlotGroup1D "IR plot" | data = dset1
    lngr1: LineGraph on domains 1 | expr = u5; xdata = expr; xdataexpr = x
  pg3: PlotGroup1D "OR plot" | data = dset1
    lngr1: LineGraph on domains 2 | expr = u5
  pg4: PlotGroup1D "FL plot" | data = dset1
    lngr1: LineGraph on domains 3 | expr = u5
  pg5: PlotGroup1D "CC plot" | data = dset1
    lngr1: LineGraph on domains 4 | expr = u5
  pg6: PlotGroup1D "1D Plot Group 6" | data = dset1
    lngr1: LineGraph on all domains | expr = u5